<?xml version="1.0" ?>
<flight_control name="Generic Flight Control">
    <channel name="Pilot_Inputs">
        <summer name="Pilot Roll Command - Norm">
            <input>fcs/aileron-cmd-norm</input>
            <input>fcs/roll-trim-cmd-norm</input>
            <clipto>
                <min>-1.0</min>
                <max>1.0</max>
            </clipto>
            <output>fcs/pilotRoll_norm</output>
        </summer>
        <summer name="Pilot Pitch Command - Norm">
            <input>fcs/elevator-cmd-norm</input>
            <input>fcs/pitch-trim-cmd-norm</input>
            <clipto>
                <min>-1.0</min>
                <max>1.0</max>
            </clipto>
            <output>fcs/pilotPitch_norm</output>
        </summer>
        <summer name="Pilot Yaw Command - Norm">
            <input>fcs/rudder-cmd-norm</input>
            <input>fcs/yaw-trim-cmd-norm</input>
            <clipto>
                <min>-1.0</min>
                <max>1.0</max>
            </clipto>
            <output>fcs/pilotYaw_norm</output>
        </summer>
        <summer name="Pilot Flap Command - Norm">
            <input>fcs/flap-cmd-norm</input>
            <clipto>
                <min>-1.0</min>
                <max>1.0</max>
            </clipto>
            <output>fcs/pilotFlap_norm</output>
        </summer>
        <pure_gain name="Pilot Roll Command">
            <input>fcs/pilotRoll_norm</input>
            <gain>0.7</gain>
            <output>fcs/cmdRoll_rps</output>
        </pure_gain>
        <pure_gain name="Pilot Pitch Command">
            <input>fcs/pilotPitch_norm</input>
            <gain>-0.35</gain>
            <output>fcs/cmdPitch_rps</output>
        </pure_gain>
        <pure_gain name="Pilot Yaw Command">
            <input>fcs/pilotYaw_norm</input>
            <gain>-0.35</gain>
            <output>fcs/cmdYaw_rps</output>
        </pure_gain>
        <pure_gain name="Pilot Flap Command">
            <input>fcs/pilotFlap_norm</input>
            <gain>0.35</gain>
            <output>fcs/cmdFlap_rad</output>
        </pure_gain>
    </channel>

    <channel name="Control Mixer">
        <pure_gain name="Aileron Left">
            <input>fcs/cmdRoll_rps</input>
            <gain>0.5</gain>
            <output>fcs/cmdAilL_rad</output>
        </pure_gain>
        <pure_gain name="Aileron Right">
            <input>fcs/cmdRoll_rps</input>
            <gain>-0.5</gain>
            <output>fcs/cmdAilR_rad</output>
        </pure_gain>

        <pure_gain name="Elevator">
            <input>fcs/cmdPitch_rps</input>
            <gain>-1.0</gain>
            <output>fcs/cmdElev_rad</output>
        </pure_gain>

        <pure_gain name="Rudder">
            <input>fcs/cmdYaw_rps</input>
            <gain>-1.0</gain>
            <output>fcs/cmdRud_rad</output>
        </pure_gain>

        <pure_gain name="Flap L">
            <input>fcs/cmdFlap_rad</input>
            <gain>1.0</gain>
            <output>fcs/cmdFlapL_rad</output>
        </pure_gain>
        <pure_gain name="Flap R">
            <input>fcs/cmdFlap_rad</input>
            <gain>1.0</gain>
            <output>fcs/cmdFlapR_rad</output>
        </pure_gain>
    </channel>

    <property>fcs/cmdAilR_ext_rad</property>
    <property>fcs/cmdAilL_ext_rad</property>
    <property>fcs/cmdElev_ext_rad</property>
    <property>fcs/cmdRud_ext_rad</property>
    <property>fcs/cmdFlapL_ext_rad</property>
    <property>fcs/cmdFlapR_ext_rad</property>
    <property>fcs/cmdMotor_ext_nd</property>

    <channel name="External">
        <summer>
            <input>fcs/cmdAilR_rad</input>
            <input>fcs/cmdAilR_ext_rad</input>
            <output>fcs/cmdAilR_rad</output>
        </summer>
        <summer>
            <input>fcs/cmdAilL_rad</input>
            <input>fcs/cmdAilL_ext_rad</input>
            <output>fcs/cmdAilL_rad</output>
        </summer>
        <summer>
            <input>fcs/cmdElev_rad</input>
            <input>fcs/cmdElev_ext_rad</input>
            <output>fcs/cmdElev_rad</output>
        </summer>
        <summer>
            <input>fcs/cmdRud_rad</input>
            <input>fcs/cmdRud_ext_rad</input>
            <output>fcs/cmdRud_rad</output>
        </summer>
        <summer>
            <input>fcs/cmdFlapL_rad</input>
            <input>fcs/cmdFlapL_ext_rad</input>
            <output>fcs/cmdFlapL_rad</output>
        </summer>
        <summer>
            <input>fcs/cmdFlapR_rad</input>
            <input>fcs/cmdFlapR_ext_rad</input>
            <output>fcs/cmdFlapR_rad</output>
        </summer>
        <summer>
            <input>fcs/throttle-cmd-norm</input>
            <input>fcs/cmdMotor_ext_nd</input>
            <output>fcs/throttle-pos-norm</output>
        </summer>
    </channel>

</flight_control>
